@Parser IsotropicMisesCreep;
@Behaviour NortonSpec;
@Author Helfer Thomas;
@Date 23/11/06;

@MaterialProperty real A;
@MaterialProperty real E;

@FlowRule{
  const real tmp = A*pow(seq,E-1.);
  f       = tmp*seq;
  df_dseq = E*tmp;
}
