@Parser IsotropicPlasticMisesFlow;
@Behaviour Plasticity;
@Author Helfer Thomas;
@Date 23/11/06;

@MaterialProperty thermalexpansion alpha;    /* mandatory for castem */
alpha.setGlossaryName("ThermalExpansion");
@MaterialProperty stress s0;
@MaterialProperty stress ET;

@FlowRule{
  real   H  = young*ET/(young-ET);
  f       = seq-H*p-s0;
  df_dseq = 1;
  df_dp   = -H;
}
